**
** Heading +++++++++++++++++++++++++++++++++++++++++++++++++
**
*Heading
Hash: 4z6Otmxe, Date: 12/24/2024, Unit system: MM_TON_S_C
**
** Nodes +++++++++++++++++++++++++++++++++++++++++++++++++++
**
*Node
1, 2.00000000E+002, 0.00000000E+000, 0.00000000E+000
2, 2.00000000E+002, 0.00000000E+000, 2.00000000E+002
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**
** Elements ++++++++++++++++++++++++++++++++++++++++++++++++
**
*Element, Type=C3D8, Elset=Solid_part-1
1, 1, 9, 237, 28, 85, 598, 2403, 959
2, 85, 598, 2403, 959, 86, 599, 2404, 960
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*Element, Type=C3D8, Elset=Solid_part-2
8001, 9262, 9270, 9498, 9289, 9346, 9859, 11664, 10220
8002, 9346, 9859, 11664, 10220, 9347, 9860, 11665, 10221
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**
** Additional elements +++++++++++++++++++++++++++++++++++++
**
*Element, Type=SPRING1, Elset=k_1_All
16001, 18523
*Element,TYPE=SPRINGA,ELSET=ESPRING
999999,18525,18527
**
** Node sets +++++++++++++++++++++++++++++++++++++++++++++++
**
*Nset, Nset=END_1_1
1, 2, 5, 6, 9, 10
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*Nset, Nset=END_1_2
3, 4, 7, 8, 47, 48
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*Nset, Nset=END_2_1
9262, 9263, 9266, 9267, 9270, 9271
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*Nset, Nset=END_2_2
9264, 9265, 9268, 9269, 9308, 9309
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*Nset, Nset=NSET_BC_1
28, 29, 30, 31, 32, 33
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*Nset, Nset=NSET_BC_2
9289, 9290, 9291, 9292, 9293, 9294
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*Nset, Nset=Internal_Selection-1_Node_of_Cube_1
4
*Nset, Nset=Internal_Selection-1_Node_of_Cube_2
9265
**
** Additional node sets ++++++++++++++++++++++++++++++++++++
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**
** Element sets ++++++++++++++++++++++++++++++++++++++++++++
**
*Elset, Elset=Internal_Selection-1_SECTION_CUBE_1
Solid_part-1
*Elset, Elset=Internal_Selection-1_SECTION_CUBE_2
Solid_part-2
**
** Additional element sets +++++++++++++++++++++++++++++++++
**
*Elset, Elset=k_1_DOF_2
16001
*Elset, Elset = ESPRING
999999
**
** Surfaces ++++++++++++++++++++++++++++++++++++++++++++++++
**
**
** Physical constants ++++++++++++++++++++++++++++++++++++++
**
**
** Coordinate systems ++++++++++++++++++++++++++++++++++++++
**
**
** Materials +++++++++++++++++++++++++++++++++++++++++++++++
**
** Name: S420: Deactivated
*Material, Name=Cube_1
*Density
1.125E-09
*Elastic
210000, 0.3
*Material, Name=Cube_2
*Density
1.25E-10
*Elastic
210000, 0.3
**
** Sections ++++++++++++++++++++++++++++++++++++++++++++++++
**
*Solid section, Elset=Internal_Selection-1_SECTION_CUBE_1, Material=Cube_1
*Solid section, Elset=Internal_Selection-1_SECTION_CUBE_2, Material=Cube_2
**
** Additional sections +++++++++++++++++++++++++++++++++++++
**
*Spring, Elset=k_1_DOF_2
2
0.024
*Spring,ELSET=ESPRING

0.003
**
** Pre-tension sections ++++++++++++++++++++++++++++++++++++
**
**
** Constraints +++++++++++++++++++++++++++++++++++++++++++++
**
*Rigid body, Nset=END_1_1, Ref node=18523, Rot node=18524
*Rigid body, Nset=END_1_2, Ref node=18525, Rot node=18526
*Rigid body, Nset=END_2_1, Ref node=18527, Rot node=18528
*Rigid body, Nset=END_2_2, Ref node=18529, Rot node=18530
**
** Surface interactions ++++++++++++++++++++++++++++++++++++
**
**
** Contact pairs +++++++++++++++++++++++++++++++++++++++++++
**
**
** Amplitudes ++++++++++++++++++++++++++++++++++++++++++++++
**
*Amplitude, Name=AMPLITUDE_SHOCK_4_SEC
0, 0, 0.1, 1, 0.11, 0, 4, 0
**
** Initial conditions ++++++++++++++++++++++++++++++++++++++
**
**
** Steps +++++++++++++++++++++++++++++++++++++++++++++++++++
**
**
** NORMAL_MODES ++++++++++++++++++++++++++++++++++++++++++++
**
*Step
*Frequency, Storage=Yes
2
**
** Controls ++++++++++++++++++++++++++++++++++++++++++++++++
**
**
** Output frequency ++++++++++++++++++++++++++++++++++++++++
**
*Output, Frequency=1
**
** Boundary conditions +++++++++++++++++++++++++++++++++++++
**
*Boundary, op=New
** Name: BC_1
*Boundary, Fixed
NSET_BC_1, 1, 1
NSET_BC_1, 3, 3
** Name: BC_2
*Boundary, Fixed
NSET_BC_2, 1, 1
NSET_BC_2, 3, 3
**
** Loads +++++++++++++++++++++++++++++++++++++++++++++++++++
**
**
** Defined fields ++++++++++++++++++++++++++++++++++++++++++
**
**
** History outputs +++++++++++++++++++++++++++++++++++++++++
**
**
** Field outputs +++++++++++++++++++++++++++++++++++++++++++
**
*Node file
RF, U
*El file
S, E, NOE
**
** End step ++++++++++++++++++++++++++++++++++++++++++++++++
**
*End step
**
** MODAL_DYNAMICS ++++++++++++++++++++++++++++++++++++++++++
**
*Step, Inc=100000
*Modal dynamics
0.01, 4
**
** Damping +++++++++++++++++++++++++++++++++++++++++++++++++
**
*Modal damping
1, 1000000, 0.01
**
** Controls ++++++++++++++++++++++++++++++++++++++++++++++++
**
**
** Output frequency ++++++++++++++++++++++++++++++++++++++++
**
*Output, Frequency=1
**
** Boundary conditions +++++++++++++++++++++++++++++++++++++
**
**
** Loads +++++++++++++++++++++++++++++++++++++++++++++++++++
**
*Cload, op=New
*Dload, op=New
** Name: Concentrated_Force-1
*Cload, Amplitude=AMPLITUDE_SHOCK_4_SEC
18529, 2, 5
**
** Defined fields ++++++++++++++++++++++++++++++++++++++++++
**
**
** History outputs +++++++++++++++++++++++++++++++++++++++++
**
*Node print, Nset=Internal_Selection-1_Node_of_Cube_1, Global=Yes
U
*Node print, Nset=Internal_Selection-1_Node_of_Cube_2, Global=Yes
U
**
** Field outputs +++++++++++++++++++++++++++++++++++++++++++
**
*Node file
RF, U
*El file
S, E, NOE
**
** End step ++++++++++++++++++++++++++++++++++++++++++++++++
**
*End step
