**
** Heading +++++++++++++++++++++++++++++++++++++++++++++++++
**
*Heading
Hash: oMcQXSUN, Date: 12/22/2024, Unit system: MM_TON_S_C
**
** Nodes +++++++++++++++++++++++++++++++++++++++++++++++++++
**
*Node
1, 3.60000000E-015, 0.00000000E+000, 0.00000000E+000
2, 5.00000000E+001, 0.00000000E+000, 0.00000000E+000
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**
** Elements ++++++++++++++++++++++++++++++++++++++++++++++++
**
*Element, Type=S4, Elset=Shell_part-1
1, 17, 1, 112, 545
2, 18, 17, 545, 546
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*Element, Type=S3, Elset=Shell_part-1
1247, 4557, 4562, 4558
1854, 2253, 2258, 2254
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**
** Node sets +++++++++++++++++++++++++++++++++++++++++++++++
**
*Nset, Nset=FixEndNodes
1, 4, 89, 90, 91, 92
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*Nset, Nset=ForceNodes
15, 16, 497, 498, 499, 500
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**
** Element sets ++++++++++++++++++++++++++++++++++++++++++++
**
*Elset, Elset=set_1
1, 2, 3, 4, 5, 6
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*Elset, Elset=set_2
626, 627, 628, 629, 630, 631
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*Elset, Elset=set_3
1252, 1253, 1254, 1255, 1256, 1257
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*Elset, Elset=set_4
1878, 1879, 1880, 1881, 1882, 1883
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*Elset, Elset=set_5
2504, 2505, 2506, 2507, 2508, 2509
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*Elset, Elset=set_6
3130, 3131, 3132, 3133, 3134, 3135
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*Elset, Elset=set_7
1247, 3756, 3757, 3758, 3759, 3760
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**
** Surfaces ++++++++++++++++++++++++++++++++++++++++++++++++
**
**
** Physical constants ++++++++++++++++++++++++++++++++++++++
**
**
** Coordinate systems ++++++++++++++++++++++++++++++++++++++
**
**
** Materials +++++++++++++++++++++++++++++++++++++++++++++++
**
*Material, Name=ABS
*Density
1.02E-09
*Elastic
2000, 0.394
*Expansion, Zero=20
7.4E-05
*Conductivity
0.2256
*Specific heat
1386000000
**
** Sections ++++++++++++++++++++++++++++++++++++++++++++++++
**
*Shell section, Elset=set_1, Material=ABS, Offset=0
1
*Shell section, Elset=set_2, Material=ABS, Offset=0
1
*Shell section, Elset=set_3, Material=ABS, Offset=0
1
*Shell section, Elset=set_4, Material=ABS, Offset=0
1
*Shell section, Elset=set_5, Material=ABS, Offset=0
1
*Shell section, Elset=set_6, Material=ABS, Offset=0
1
*Shell section, Elset=set_7, Material=ABS, Offset=0
1
**
** Pre-tension sections ++++++++++++++++++++++++++++++++++++
**
**
** Constraints +++++++++++++++++++++++++++++++++++++++++++++
**
**
** Surface interactions ++++++++++++++++++++++++++++++++++++
**
**
** Contact pairs +++++++++++++++++++++++++++++++++++++++++++
**
**
** Amplitudes ++++++++++++++++++++++++++++++++++++++++++++++
**
**
** Initial conditions ++++++++++++++++++++++++++++++++++++++
**
**
** Steps +++++++++++++++++++++++++++++++++++++++++++++++++++
**
**
** STATIC_LOADING ++++++++++++++++++++++++++++++++++++++++++
**
*Step
*Static
**
** Controls ++++++++++++++++++++++++++++++++++++++++++++++++
**
**
** Output frequency ++++++++++++++++++++++++++++++++++++++++
**
*Output, Frequency=1
**
** Boundary conditions +++++++++++++++++++++++++++++++++++++
**
*Boundary, op=New
** Name: Fixed-1
*Boundary
FixEndNodes, 1, 6, 0
**
** Loads +++++++++++++++++++++++++++++++++++++++++++++++++++
**
*Cload, op=New
*Dload, op=New
** Name: Concentrated_Force-1
*Cload
ForceNodes, 2, 0.01
**
** Defined fields ++++++++++++++++++++++++++++++++++++++++++
**
**
** History outputs +++++++++++++++++++++++++++++++++++++++++
**
**
** Field outputs +++++++++++++++++++++++++++++++++++++++++++
**
*Node file
RF, U
*El file
S, E, NOE
**
** End step ++++++++++++++++++++++++++++++++++++++++++++++++
**
*End step
